/OUTPUT,TERM
/UIS,MSGPOP,3
/SOL
ALLSEL,ALL
LSCLEAR,ALL

D,YUESHU, , , , , ,ALL, , , , ,            !施加约束边界条件

MT=70         !计算模态阶数

paox=1*0.182*9.81          !OBE地震分析时X向加速度-o周期加速度
paoy=1*0.182*9.81          !OBE地震分析时Y向加速度-o周期加速度
paoz=1*0.253*9.81          !OBE地震分析时Z向加速度-o周期加速度

pasx=1*0.477*9.81          !SSE地震分析时X向加速度-o周期加速度
pasy=1*0.477*9.81          !SSE地震分析时Y向加速度-o周期加速度
pasz=1*0.425*9.81          !SSE地震分析时Z向加速度-o周期加速度


!*
ANTYPE,2
!*
MSAVE,0
!*
MODOPT,LANB,MT
EQSLV,SPAR
MXPAND,MT,,,1
LUMPM,0
PSTRES,0
!*
MODOPT,LANB,MT,0,0,,OFF
/OUTPUT,'Mode','oup','',
/STATUS,SOLU
SOLVE
FINISH
/OUTPUT,TERM

/SOLU
ALLSEL,ALL
ANTYPE,8
SPOPT,SPRS,MT,NO,YES
FREQ
SVTYP,2,9.81,
SED,1,0,0,
ROCK,0,0,0,0,0,0,
!SL-1(XY) 7%  Envelop:(NR_1818,8.5)
FREQ    ,  0.100,  0.123,  0.146,  0.187,  0.230,  0.308,  0.364,  0.710
FREQ    ,  1.034,  1.078,  1.273,  1.384,  1.443,  1.932,  2.101,  2.190
FREQ    ,  3.057,  3.188,  3.323,  3.465,  3.927,  4.094,  4.450,  4.837
FREQ    ,  5.043,  5.258,  5.715,  6.753,  7.341,  7.653,  9.043, 10.685
FREQ    , 11.140, 11.614, 14.917, 15.552, 16.214, 17.625, 18.375, 20.825
FREQ    , 22.636, 24.606, 25.654, 29.073, 30.311, 31.602, 32.948, 35.815
FREQ    , 42.317,100.000
SV, 0.07,  0.015,  0.025,  0.031,  0.035,  0.060,  0.078,  0.086,  0.155
SV, 0.07,  0.218,  0.222,  0.268,  0.310,  0.312,  0.398,  0.547,  0.561
SV, 0.07,  0.561,  0.557,  0.552,  0.492,  0.368,  0.333,  0.274,  0.261
SV, 0.07,  0.264,  0.266,  0.266,  0.266,  0.266,  0.262,  0.259,  0.390
SV, 0.07,  0.390,  0.390,  0.390,  0.384,  0.349,  0.300,  0.280,  0.249
SV, 0.07,  0.249,  0.249,  0.224,  0.189,  0.188,  0.186,  0.184,  0.182
SV, 0.07,  0.182,  0.182

GRP,0.000001,DISP
LSWRITE,21,

FREQ
SVTYP,2,9.81,
SED,0,1,0,
ROCK,0,0,0,0,0,0,
!SL-1(XY) 7%  Envelop:(NR_1818,8.5)
FREQ    ,  0.100,  0.123,  0.146,  0.187,  0.230,  0.308,  0.364,  0.710
FREQ    ,  1.034,  1.078,  1.273,  1.384,  1.443,  1.932,  2.101,  2.190
FREQ    ,  3.057,  3.188,  3.323,  3.465,  3.927,  4.094,  4.450,  4.837
FREQ    ,  5.043,  5.258,  5.715,  6.753,  7.341,  7.653,  9.043, 10.685
FREQ    , 11.140, 11.614, 14.917, 15.552, 16.214, 17.625, 18.375, 20.825
FREQ    , 22.636, 24.606, 25.654, 29.073, 30.311, 31.602, 32.948, 35.815
FREQ    , 42.317,100.000
SV, 0.07,  0.015,  0.025,  0.031,  0.035,  0.060,  0.078,  0.086,  0.155
SV, 0.07,  0.218,  0.222,  0.268,  0.310,  0.312,  0.398,  0.547,  0.561
SV, 0.07,  0.561,  0.557,  0.552,  0.492,  0.368,  0.333,  0.274,  0.261
SV, 0.07,  0.264,  0.266,  0.266,  0.266,  0.266,  0.262,  0.259,  0.390
SV, 0.07,  0.390,  0.390,  0.390,  0.384,  0.349,  0.300,  0.280,  0.249
SV, 0.07,  0.249,  0.249,  0.224,  0.189,  0.188,  0.186,  0.184,  0.182
SV, 0.07,  0.182,  0.182

GRP,0.000001,DISP
LSWRITE,22,

FREQ
SVTYP,2,9.81,
SED,0,0,1,
ROCK,0,0,0,0,0,0,
!SL-1(Z) 7%  Envelop:(NR_1818,8.5)
FREQ    ,  0.100,  0.104,  0.230,  0.380,  0.553,  1.124,  1.171,  1.221
FREQ    ,  1.273,  1.443,  1.705,  1.853,  1.932,  2.015,  2.588,  3.612
FREQ    ,  3.766,  4.094,  4.640,  4.837,  5.959,  6.213,  8.673,  9.829
FREQ    , 10.248, 10.685, 11.140, 12.109, 12.624, 15.552, 16.905, 17.625
FREQ    , 20.825, 22.636, 23.600, 24.606, 27.885, 29.073, 30.311, 40.588
FREQ    , 42.317,100.000
SV, 0.07,  0.009,  0.010,  0.035,  0.061,  0.086,  0.190,  0.202,  0.207
SV, 0.07,  0.212,  0.241,  0.309,  0.402,  0.458,  0.485,  0.514,  0.514
SV, 0.07,  0.495,  0.451,  0.385,  0.374,  0.372,  0.401,  0.401,  0.502
SV, 0.07,  0.556,  0.598,  0.608,  0.609,  0.609,  0.609,  0.569,  0.560
SV, 0.07,  0.560,  0.560,  0.559,  0.558,  0.556,  0.556,  0.502,  0.261
SV, 0.07,  0.253,  0.253

GRP,0.000001,DISP

LSWRITE,23,
LSSOLVE,21,23,1,
FINISH
/POST1
/INPUT,'djs','mcom','','',0
LCWRITE,92,'OBE','',''
LCFILE,92,'OBE','l92',''

/SOLU
ALLSEL,ALL
ANTYPE,8
SPOPT,SPRS,MT,NO,YES
FREQ
SVTYP,2,9.81,
SED,1,0,0,
ROCK,0,0,0,0,0,0,
!SL-2(XY) 10%  Envelop:(NR_1818,8.5)
FREQ    ,  0.100,  0.123,  0.146,  0.221,  0.230,  0.308,  1.034,  1.171
FREQ    ,  1.273,  1.328,  1.384,  1.569,  1.853,  1.932,  2.101,  2.932
FREQ    ,  3.057,  3.323,  3.465,  3.612,  3.766,  3.927,  5.482,  5.715
FREQ    ,  7.979,  8.319,  8.673, 13.723, 15.552, 16.214, 18.375, 19.158
FREQ    , 19.974, 25.654, 26.746, 30.311, 31.602, 32.948, 34.351, 38.930
FREQ    , 42.317,100.000
SV, 0.10,  0.043,  0.067,  0.081,  0.142,  0.153,  0.200,  0.540,  0.591
SV, 0.10,  0.661,  0.698,  0.720,  0.736,  0.836,  0.905,  1.066,  1.066
SV, 0.10,  1.062,  0.968,  0.927,  0.867,  0.803,  0.733,  1.514,  1.737
SV, 0.10,  1.737,  1.723,  1.546,  0.691,  0.618,  0.612,  0.570,  0.562
SV, 0.10,  0.547,  0.518,  0.513,  0.504,  0.501,  0.497,  0.494,  0.482
SV, 0.10,  0.477,  0.477

GRP,0.000001,DISP
LSWRITE,24,

FREQ
SVTYP,2,9.81,
SED,0,1,0,
ROCK,0,0,0,0,0,0,
!SL-2(XY) 10%  Envelop:(NR_1818,8.5)
FREQ    ,  0.100,  0.123,  0.146,  0.221,  0.230,  0.308,  1.034,  1.171
FREQ    ,  1.273,  1.328,  1.384,  1.569,  1.853,  1.932,  2.101,  2.932
FREQ    ,  3.057,  3.323,  3.465,  3.612,  3.766,  3.927,  5.482,  5.715
FREQ    ,  7.979,  8.319,  8.673, 13.723, 15.552, 16.214, 18.375, 19.158
FREQ    , 19.974, 25.654, 26.746, 30.311, 31.602, 32.948, 34.351, 38.930
FREQ    , 42.317,100.000
SV, 0.10,  0.043,  0.067,  0.081,  0.142,  0.153,  0.200,  0.540,  0.591
SV, 0.10,  0.661,  0.698,  0.720,  0.736,  0.836,  0.905,  1.066,  1.066
SV, 0.10,  1.062,  0.968,  0.927,  0.867,  0.803,  0.733,  1.514,  1.737
SV, 0.10,  1.737,  1.723,  1.546,  0.691,  0.618,  0.612,  0.570,  0.562
SV, 0.10,  0.547,  0.518,  0.513,  0.504,  0.501,  0.497,  0.494,  0.482
SV, 0.10,  0.477,  0.477

GRP,0.000001,DISP
LSWRITE,25,

FREQ
SVTYP,2,9.81,
SED,0,0,1,
ROCK,0,0,0,0,0,0,
!SL-2(Z) 10%  Envelop:(NR_1818,8.5)
FREQ    ,  0.100,  0.221,  0.553,  0.805,  1.124,  1.171,  1.443,  1.569
FREQ    ,  1.853,  1.932,  2.015,  2.101,  2.283,  2.482,  2.588,  3.612
FREQ    ,  3.927,  4.268,  4.450,  5.482,  5.715,  7.979,  8.319,  8.673
FREQ    , 13.162, 13.723, 14.307, 17.625, 19.158, 22.636, 23.600, 24.606
FREQ    , 26.746, 27.885, 29.073, 35.815, 38.930, 47.958,100.000
SV, 0.10,  0.017,  0.062,  0.162,  0.307,  0.420,  0.434,  0.449,  0.498
SV, 0.10,  0.674,  0.729,  0.775,  0.783,  0.851,  0.890,  0.906,  0.906
SV, 0.10,  0.860,  0.803,  0.780,  1.372,  1.523,  1.523,  1.484,  1.324
SV, 0.10,  0.896,  0.830,  0.754,  0.587,  0.586,  0.586,  0.585,  0.584
SV, 0.10,  0.583,  0.577,  0.550,  0.429,  0.427,  0.425,  0.425

GRP,0.000001,DISP

LSWRITE,26,
LSSOLVE,24,26,1,
FINISH
/POST1
/INPUT,'djs','mcom','','',0
LCWRITE,93,'SSE','',''
LCFILE,93,'SSE','l93',''

/SOL
ALLSEL,ALL
ANTYPE,0
!ANTYPE,,REST
!SW-1


!_______________________LOAD STEP 1__________________自重
LSCLEAR,ALL
D,YUESHU, , , , , ,ALL, , , , ,            !施加约束边界条件


ACEL,0,0,9.81                    !Z向为竖向
LSWRITE,1,                       !自重

!_______________________LOAD STEP 2_______________________SL1_X
LSCLEAR,ALL
D,YUESHU, , , , , ,ALL, , , , ,            !施加约束边界条件


ALLSEL,ALL
ACEL,paox,0,0,

LSWRITE,2                         !SL1_X

!_______________________LOAD STEP 3_______________________SL1_Y
LSCLEAR,ALL
D,YUESHU, , , , , ,ALL, , , , ,            !施加约束边界条件


ALLSEL,ALL
ACEL,0,paoy,0,

LSWRITE,3                         !SL1_Y


!_______________________LOAD STEP 4_______________________SL1_Z
LSCLEAR,ALL
D,YUESHU, , , , , ,ALL, , , , ,            !施加约束边界条件


ALLSEL,ALL
ACEL,0,0,paoz

LSWRITE,4                         !SL1_Z


!_______________________LOAD STEP 5_______________________SL2_X
LSCLEAR,ALL
D,YUESHU, , , , , ,ALL, , , , ,            !施加约束边界条件


ALLSEL,ALL
ACEL,pasx,0,0,

LSWRITE,5                         !SL2_X

!_______________________LOAD STEP 6_______________________SL2_Y
LSCLEAR,ALL
D,YUESHU, , , , , ,ALL, , , , ,            !施加约束边界条件


ALLSEL,ALL
ACEL,0,pasy,0,

LSWRITE,6                         !SL2_Y

!_______________________LOAD STEP 7_______________________SL2_Z
LSCLEAR,ALL
D,YUESHU, , , , , ,ALL, , , , ,            !施加约束边界条件


ALLSEL,ALL
ACEL,0,0,pasz

LSWRITE,7                         !SL2_Z


LSSOLVE,1,7,1,
FINISH
/POST1
LCDEF,1,1,,
LCDEF,2,2,,
LCDEF,3,3,,
LCDEF,4,4,,
LCDEF,5,5,,
LCDEF,6,6,,
LCDEF,7,7,,

LCASE,2,
LCOPER,SRSS,3,,,
LCOPER,SRSS,4,,,
LCOPER,SRSS,92,,,
LCWRITE,40,'SOBE','',''
LCFILE,40,'SOBE','l40',''

LCASE,5,
LCOPER,SRSS,6,,,
LCOPER,SRSS,7,,,
LCOPER,SRSS,93,,,
LCWRITE,41,'SSSE','',''
LCFILE,41,'SSSE','l41',''

LCZERO
LCASE,1,
LCWRITE,80,'Normal','',''        !!正常工况  自重

!!!!
LCZERO
LCASE,1,
LCOPER,ADD,40,,,
LCWRITE,81,'UP1','',''         !正常工况+SL1

LCZERO
LCASE,1,
LCOPER,SUB,40,,,
LCWRITE,82,'UP2','',''         !正常工况-SL1

LCZERO
LCASE,1,
LCOPER,ADD,41,,,
LCWRITE,83,'FA1','','          !正常工况+SL2

LCZERO
LCASE,1,
LCOPER,SUB,41,,,
LCWRITE,84,'FA2','','          !正常工况-SL2


!!!
LCFILE,81,UP1,L81
LCFILE,82,UP2,L82
LCFILE,83,FA1,L83
LCFILE,84,FA2,L84


LCZERO
LCASE,81,
LCOPER,ABMX,82,,,
LCWRITE,61,Upset                    !!异常工况


LCZERO
LCASE,83,
LCOPER,ABMX,84,,,
LCWRITE,62,Faulted                    !!事故工况

LCFILE,80,'Normal','l80',''
LCFILE,61,'UpSet','l61',''
LCFILE,62,'Faulted','l62',''
SAVE
